# OpenSim document version 40000
Model UpperBody_CameraFrame:
  gravity: 0 9.80665 0
  length_units: meters
  force_units: N
  credits:
    Upper body only. Thorax is the root. Ground axes match the RealSense colour camera: +X right, +Y down, +Z forward, origin at the camera. Derived from the Pose2Sim Rajagopal adaptation. Arm joints were not rewritten. Pelvis and legs are omitted. Gravity is +Y because +Y is down.
  publications:
    Pagnon, D., Domalain, M., Reveret, L. (2021). Pose2Sim: An End-to-End Workflow for 3D Markerless Sports Kinematics—Part 1: Robustness. Sensors, 21(19), 6530.
  Ground
  BodySet:
    Body torso: mass=22.5487 mass_center=(-0.03 0.32 0) inertia=(1.4745 0.7555 1.4314 0 0 0)
        meshes=(hat_spine.vtp hat_ribs_scap.vtp)
    Body head: mass=4.2778 mass_center=(0.01606673 0.05850891 0) inertia=(0.01149092 0.008314703 0.01253026 0 0 0)
        meshes=(jaw.vtp skull.vtp)
    Body humerus_r: mass=2.0325 mass_center=(0 -0.164502 0) inertia=(0.011946 0.004121 0.013409 0 0 0)
        meshes=humerus_rv.vtp
    Body ulna_r: mass=0.6075 mass_center=(0 -0.120525 0) inertia=(0.002962 0.000618 0.003213 0 0 0) meshes=ulna_rv.vtp
    Body radius_r: mass=0.6075 mass_center=(0 -0.120525 0) inertia=(0.002962 0.000618 0.003213 0 0 0)
        meshes=radius_rv.vtp
    Body hand_r: mass=0.4575 mass_center=(0 -0.068095 0) inertia=(0.000892 0.000547 0.00134 0 0 0)
        meshes=(pisiform_rvs.vtp lunate_rvs.vtp scaphoid_rvs.vtp triquetrum_rvs.vtp hamate_rvs.vtp capitate_rvs.vtp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)
    Body humerus_l: mass=2.0325 mass_center=(0 -0.164502 0) inertia=(0.011946 0.004121 0.013409 0 0 0)
        meshes=humerus_lv.vtp
    Body ulna_l: mass=0.6075 mass_center=(0 -0.120525 0) inertia=(0.002962 0.000618 0.003213 0 0 0) meshes=ulna_lv.vtp
    Body radius_l: mass=0.6075 mass_center=(0 -0.120525 0) inertia=(0.002962 0.000618 0.003213 0 0 0)
        meshes=radius_lv.vtp
    Body hand_l: mass=0.4575 mass_center=(0 -0.068095 0) inertia=(0.000892 0.000547 0.00134 0 0 0)
        meshes=(pisiform_lvs.vtp lunate_lvs.vtp scaphoid_lvs.vtp triquetrum_lvs.vtp hamate_lvs.vtp capitate_lvs.vtp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)
  JointSet:
    CustomJoint ground_thorax: socket_parent_frame=ground_camera_offset socket_child_frame=torso_root_offset
      Coordinate thorax_rx: default_value=0 range=(-3.141593 3.141593) clamped=false
      Coordinate thorax_ry: default_value=0 range=(-3.141593 3.141593) clamped=false
      Coordinate thorax_rz: default_value=0 range=(-3.141593 3.141593) clamped=false
      Coordinate thorax_tx: default_value=0 range=(-5 5) clamped=false
      Coordinate thorax_ty: default_value=0 range=(-5 5) clamped=false
      Coordinate thorax_tz: default_value=0 range=(-5 5) clamped=false
      PhysicalOffsetFrame ground_camera_offset: socket_parent=/ground translation=(0 -1.0215 0.1007)
      PhysicalOffsetFrame torso_root_offset: socket_parent=/bodyset/torso translation=(0 0 0)
          orientation=(0 -1.570796 -3.141593)
      SpatialTransform:
        TransformAxis rotation1: coordinates=thorax_rx axis=(1 0 0) LinearFunction(coefficients=1 0)
        TransformAxis rotation2: coordinates=thorax_ry axis=(0 1 0) LinearFunction(coefficients=1 0)
        TransformAxis rotation3: coordinates=thorax_rz axis=(0 0 1) LinearFunction(coefficients=1 0)
        TransformAxis translation1: coordinates=thorax_tx axis=(1 0 0) LinearFunction(coefficients=1 0)
        TransformAxis translation2: coordinates=thorax_ty axis=(0 1 0) LinearFunction(coefficients=1 0)
        TransformAxis translation3: coordinates=thorax_tz axis=(0 0 1) LinearFunction(coefficients=1 0)
    CustomJoint head_torso: socket_parent_frame=torso_offset socket_child_frame=head_offset
      Coordinate neck_flexion: default_value=5.488091e-11 range=(-0.5 0.5) clamped=true
      Coordinate neck_bending: default_value=0 range=(-1.570796 1.570796) clamped=true
      Coordinate neck_rotation: default_value=3.658914e-10 range=(-0.785398 0.785398) clamped=true
      PhysicalOffsetFrame torso_offset: socket_parent=/bodyset/torso translation=(0 0.5414581 0)
      PhysicalOffsetFrame head_offset: socket_parent=/bodyset/head translation=(0 0.03 0)
      SpatialTransform: axes_held_at_zero=(translation1 translation2 translation3)
        TransformAxis rotation1: coordinates=neck_flexion axis=(0 0 1) LinearFunction(coefficients=1 0)
        TransformAxis rotation2: coordinates=neck_bending axis=(1 0 0) LinearFunction(coefficients=1 0)
        TransformAxis rotation3: coordinates=neck_rotation axis=(0 1 0) LinearFunction(coefficients=1 0)
    CustomJoint acromial_r: socket_parent_frame=torso_offset socket_child_frame=humerus_r_offset
      Coordinate arm_flex_r: default_value=0 range=(-1.57 1.57) clamped=false
      Coordinate arm_add_r: default_value=-1.57 range=(-2.09 1.57) clamped=false
      Coordinate arm_rot_r: default_value=0 range=(-1.57 1.57) clamped=false
      PhysicalOffsetFrame torso_offset: socket_parent=/bodyset/torso translation=(0.003155 0.3715 0.17)
      PhysicalOffsetFrame humerus_r_offset: socket_parent=/bodyset/humerus_r translation=(0 0 0)
      SpatialTransform: axes_held_at_zero=(translation1 translation2 translation3)
        TransformAxis rotation1: coordinates=arm_flex_r axis=(0 0 1) LinearFunction(coefficients=1 0)
        TransformAxis rotation2: coordinates=arm_add_r axis=(1 0 0) LinearFunction(coefficients=1 0)
        TransformAxis rotation3: coordinates=arm_rot_r axis=(0 1 0) LinearFunction(coefficients=1 0)
    PinJoint elbow_r: socket_parent_frame=humerus_r_offset socket_child_frame=ulna_r_offset
      Coordinate elbow_flex_r: default_value=7.691512e-5 range=(0 2.618) clamped=true
      PhysicalOffsetFrame humerus_r_offset: socket_parent=/bodyset/humerus_r translation=(0.013144 -0.286273 -0.009595)
          orientation=(-0.0228627 0.228018 0.0051689)
      PhysicalOffsetFrame ulna_r_offset: socket_parent=/bodyset/ulna_r translation=(0 0 0)
          orientation=(-0.0228627 0.228018 0.0051689)
    PinJoint radioulnar_r: socket_parent_frame=ulna_r_offset socket_child_frame=radius_r_offset
      Coordinate pro_sup_r: default_value=1.57 range=(0 2.09) clamped=true
      PhysicalOffsetFrame ulna_r_offset: socket_parent=/bodyset/ulna_r translation=(-0.006727 -0.013007 0.026083)
          orientation=(-1.56884 0.056428 1.53614)
      PhysicalOffsetFrame radius_r_offset: socket_parent=/bodyset/radius_r translation=(0 0 0)
          orientation=(-1.56884 0.056428 1.53614)
    UniversalJoint radius_hand_r: socket_parent_frame=radius_r_offset socket_child_frame=hand_r_offset
      Coordinate wrist_flex_r: default_value=0 range=(-1.92 1.92) clamped=true
      Coordinate wrist_dev_r: default_value=0 range=(-0.4363323 0.6108652) clamped=true
      PhysicalOffsetFrame radius_r_offset: socket_parent=/bodyset/radius_r translation=(-0.008797 -0.235841 0.01361)
          orientation=(-1.5708 0 -1.5708)
      PhysicalOffsetFrame hand_r_offset: socket_parent=/bodyset/hand_r translation=(0 0 0)
          orientation=(-1.5708 0 -1.5708)
    CustomJoint acromial_l: socket_parent_frame=torso_offset socket_child_frame=humerus_l_offset
      Coordinate arm_flex_l: default_value=0 range=(-1.57 1.57) clamped=false
      Coordinate arm_add_l: default_value=-1.57 range=(-2.09 1.57) clamped=false
      Coordinate arm_rot_l: default_value=0 range=(-1.57 1.57) clamped=false
      PhysicalOffsetFrame torso_offset: socket_parent=/bodyset/torso translation=(0.003155 0.3715 -0.17)
      PhysicalOffsetFrame humerus_l_offset: socket_parent=/bodyset/humerus_l translation=(0 0 0)
      SpatialTransform: axes_held_at_zero=(translation1 translation2 translation3)
        TransformAxis rotation1: coordinates=arm_flex_l axis=(0 0 1) LinearFunction(coefficients=1 0)
        TransformAxis rotation2: coordinates=arm_add_l axis=(-1 0 0) LinearFunction(coefficients=1 0)
        TransformAxis rotation3: coordinates=arm_rot_l axis=(0 -1 0) LinearFunction(coefficients=1 0)
    PinJoint elbow_l: socket_parent_frame=humerus_l_offset socket_child_frame=ulna_l_offset
      Coordinate elbow_flex_l: default_value=7.691512e-5 range=(0 2.618) clamped=true
      PhysicalOffsetFrame humerus_l_offset: socket_parent=/bodyset/humerus_l translation=(0.013144 -0.286273 0.009595)
          orientation=(0.0228627 -0.228018 0.0051689)
      PhysicalOffsetFrame ulna_l_offset: socket_parent=/bodyset/ulna_l translation=(0 0 0)
          orientation=(0.0228627 -0.228018 0.0051689)
    PinJoint radioulnar_l: socket_parent_frame=ulna_l_offset socket_child_frame=radius_l_offset
      Coordinate pro_sup_l: default_value=1.57 range=(0 2.09) clamped=true
      PhysicalOffsetFrame ulna_l_offset: socket_parent=/bodyset/ulna_l translation=(-0.006727 -0.013007 -0.026083)
          orientation=(1.56884 -0.056428 1.53614)
      PhysicalOffsetFrame radius_l_offset: socket_parent=/bodyset/radius_l translation=(0 0 0)
          orientation=(1.56884 -0.056428 1.53614)
    UniversalJoint radius_hand_l: socket_parent_frame=radius_l_offset socket_child_frame=hand_l_offset
      Coordinate wrist_flex_l: default_value=0 range=(-1.92 1.92) clamped=true
      Coordinate wrist_dev_l: default_value=0 range=(-0.4363323 0.6108652) clamped=true
      PhysicalOffsetFrame radius_l_offset: socket_parent=/bodyset/radius_l translation=(-0.008797 -0.235841 -0.01361)
          orientation=(1.5708 0 1.5708)
      PhysicalOffsetFrame hand_l_offset: socket_parent=/bodyset/hand_l translation=(0 0 0)
          orientation=(1.5708 0 1.5708)
  MarkerSet:
    Marker r_lelbow_study: humerus_r (0.015 -0.28 0.04) fixed=true
    Marker r_melbow_study: humerus_r (0.00225 -0.286 -0.05) fixed=true
    Marker r_lwrist_study: radius_r (0.0005 -0.225 0.05) fixed=true
    Marker r_mwrist_study: radius_r (-0.022 -0.225 -0.022) fixed=true
    Marker L_lelbow_study: humerus_l (0.015 -0.28 -0.04) fixed=true
    Marker L_melbow_study: humerus_l (0.00225 -0.286 0.05) fixed=true
    Marker L_lwrist_study: radius_l (0.0005 -0.225 -0.05) fixed=true
    Marker L_mwrist_study: radius_l (-0.022 -0.225 0.022) fixed=true
    Marker RShoulder: torso (-0.01275162 0.3663071 0.2015742) fixed=true
    Marker LShoulder: torso (-0.01275162 0.3663071 -0.2015742) fixed=true
    Marker RElbow: humerus_r (0.025 -0.2979545 -0.008737653) fixed=true
    Marker LElbow: humerus_l (0.025 -0.2979545 0.008737653) fixed=true
